/clear
/title, Three Fiber Model, Section w/ Element Nodes
/config,nproc,2 ! configure number of processors

tot_length = 1

!PRE PROCESSOR
/prep7

et, 1, 189
sectype, 1, beam, mesh
SECREAD,section_threefiber,sec,,mesh		!read section

k, 1, 0, 0, 0
k, 2, 0, 0, tot_length
k, 3, 0, tot_length/2, tot_length/2

lstr,1,2
latt,1,,1,,3,,1
lesize,all,,,50

lmesh,all
/eshape, 1
eplot

SECPLOT, 1, 2
